*Heading
** Job name: Job-mesh-demo2 Model name: Model-mesh-demo2
** Generated by: Abaqus/CAE 2022
*Preprint, echo=NO, model=NO, history=NO, contact=NO
**
** PARTS
**
*Part, name=Part-1
*Node
      1,           0.,         160.,           0.
      2,          40.,         160.,           0.
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*Element, type=S3
  1,    1,   37, 1177
  2, 1177,  112,    1
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*Nset, nset=_PickedSet3, internal, generate
     1,  10201,      1
*Elset, elset=_PickedSet3, internal, generate
     1,  20000,      1
** Section: Section-1
*Shell Section, elset=_PickedSet3, material=Material-1
2., 5
*End Part
**
**
** ASSEMBLY
**
*Assembly, name=Assembly
**
*Instance, name=Part-1-1, part=Part-1
*End Instance
**
*Node
      1,         100.,         200.,           0.
*Node
      2,         100.,           0.,           0.
*Nset, nset=_PickedSet69, internal, instance=Part-1-1
    1,    3,    4,    5,    8,    9
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*Elset, elset=_PickedSet69, internal, instance=Part-1-1
     2,    42,    82,   122,   162,   202
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*Nset, nset=_PickedSet70, internal, instance=Part-1-1
 20,
*Nset, nset=_PickedSet71, internal, instance=Part-1-1
 36,
*Nset, nset=_PickedSet75, internal
 1,
*Nset, nset=_PickedSet77, internal
 2,
*Nset, nset=_PickedSet78, internal
 1,
*Nset, nset=_PickedSet79, internal
 2,
*Elset, elset=__PickedSurf74_E2, internal, instance=Part-1-1, generate
 4002,  4762,    40
*Surface, type=ELEMENT, name=_PickedSurf74, internal
__PickedSurf74_E2, E2
*Elset, elset=__PickedSurf76_E2, internal, instance=Part-1-1, generate
 14439,  15199,     40
*Surface, type=ELEMENT, name=_PickedSurf76, internal
__PickedSurf76_E2, E2
** Constraint: Constraint-1
*Coupling, constraint name=Constraint-1, ref node=_PickedSet75, surface=_PickedSurf74
*Distributing, weighting method=UNIFORM, coupling=STRUCTURAL
** Constraint: Constraint-2
*Coupling, constraint name=Constraint-2, ref node=_PickedSet77, surface=_PickedSurf76
*Distributing, weighting method=UNIFORM, coupling=STRUCTURAL
*End Assembly
**
** MATERIALS
**
*Material, name=Material-1
*Elastic
31000., 0.33
**
** BOUNDARY CONDITIONS
**
** Name: BC-1 Type: Displacement/Rotation
*Boundary
_PickedSet69, 3, 3
** Name: BC-2 Type: Displacement/Rotation
*Boundary
_PickedSet70, 1, 1
_PickedSet70, 2, 2
** Name: BC-3 Type: Displacement/Rotation
*Boundary
_PickedSet71, 2, 2
** ----------------------------------------------------------------
**
** STEP: Step-1
**
*Step, name=Step-1, nlgeom=NO, perturbation
*Buckle
10, , 18, 30
**
** BOUNDARY CONDITIONS
**
** Name: BC-1 Type: Displacement/Rotation
*Boundary, op=NEW, load case=1
_PickedSet69, 3, 3
*Boundary, op=NEW, load case=2
_PickedSet69, 3, 3
** Name: BC-2 Type: Displacement/Rotation
*Boundary, op=NEW, load case=1
_PickedSet70, 1, 1
_PickedSet70, 2, 2
*Boundary, op=NEW, load case=2
_PickedSet70, 1, 1
_PickedSet70, 2, 2
** Name: BC-3 Type: Displacement/Rotation
*Boundary, op=NEW, load case=1
_PickedSet71, 2, 2
*Boundary, op=NEW, load case=2
_PickedSet71, 2, 2
**
** LOADS
**
** Name: Load-1   Type: Concentrated force
*Cload
_PickedSet78, 2, -5000.
** Name: Load-2   Type: Concentrated force
*Cload
_PickedSet79, 2, 5000.
**
** OUTPUT REQUESTS
**
*Restart, write, frequency=0
**
** FIELD OUTPUT: F-Output-1
**
*Output, field
*Node Output
U,
*Element Output, directions=YES
S,
*End Step
